// COMSOL Multiphysics 5.0.0.243 model "cup any.mph"
// Outline of the model tree

Geometry
  geom1 "Geometry 1" (3D, length unit mm)
    cad1: LiveLinkCAD "LiveLink for SOLIDWORKS 1"
    fin: Finalize "Form Union"

Materials
  mat1: Common "Nylon" on all domains
    def "Basic"
      heatcapacity = 1700[J/(kg*K)]
      relpermittivity = 4
      thermalexpansioncoefficient = 280e-6[1/K]
      density = 1150[kg/m^3]
      thermalconductivity = 0.26[W/(m*K)]
    Enu "Young's modulus and Poisson's ratio"
      youngsmodulus = 2e9[Pa]
      poissonsratio = 0.4

Physics
  solid: SolidMechanics on all domains
    dependent variable u = {u, v, w}
    lemm1: LinearElasticModel "Linear Elastic Material 1" (default)
    free1: Free (default)
    init1: init "Initial Values 1" (default)
    fix1: Fixed "Fixed Constraint 1" on boundaries 3, 21
    bndl1: BoundaryLoad on boundaries 10 | LoadType = TotalForce; Ftot = {0, 15, 0}

Mesh
  mesh1 "Mesh 1" (physics-controlled)
    size: MeshSizeDefault | hauto = 5

Studies
  std1 "Study 1"
    stat: Stationary

Solver configurations
  sol1 "Solution 1" (study std1)
    v1: Variables "Dependent Variables 1"
    s1: Stationary "Stationary Solver 1"
      dDef: Direct
      fc1: FullyCoupled | linsolver = dDef; termonres = auto; reserrfact = 1000

Datasets
  dset1: Solution | solution = sol1

Plots
  pg1: PlotGroup3D "Stress (solid)" | data = dset1
    surf1: Surface | expr = ppr(solid.mises); unit = MPa
      def: Deform "Deformation" | expr = {u, v, w}